<Lems>

    <!--

Parameters and setting used to generate this network:

    Data reader:                    cect.readers.SpreadsheetDataReader
    c302 version:                   0.11.1
    cect version:                   0.3.1
    owmeta version:                 - not installed -
    owmeta_core version:            - not installed -
    Cells:                          ['AVBL', 'AVBR', 'DB1', 'DB2', 'DB3', 'DB4', 'DB5', 'DB6', 'DB7', 'VD1', 'VD2', 'VD3', 'VD4', 'VD5', 'VD6', 'VD7', 'VD8', 'VD9', 'VD10', 'VD11', 'VD12', 'VD13', 'VB1', 'VB2', 'VB3', 'VB4', 'VB5', 'VB6', 'VB7', 'VB8', 'VB9', 'VB10', 'VB11', 'DD1', 'DD2', 'DD3', 'DD4', 'DD5', 'DD6']
    Cell stimulated:                []
    Connection:                     []
    Connection numbers overridden:  {'^.+-.+$': 1}
    Connection numbers scaled:      None
    Connection polarities override: {'^DB\\d+-DD\\d+$': 'inh', '^VB\\d+-VD\\d+$': 'inh'}
    Muscles:                        True

    Known BioParameters:
        BioParameter: AVBL_to_DB3_elec_syn_gbase = 0.001 nS (SRC: Add with param_overrides, certainty 0)
        BioParameter: AVBL_to_DB4_elec_syn_gbase = 0.001 nS (SRC: Add with param_overrides, certainty 0)
        BioParameter: AVBL_to_DB5_elec_syn_gbase = 0.001 nS (SRC: Add with param_overrides, certainty 0)
        BioParameter: AVBL_to_DB6_elec_syn_gbase = 0.001 nS (SRC: Add with param_overrides, certainty 0)
        BioParameter: AVBL_to_DB7_elec_syn_gbase = 0.001 nS (SRC: Add with param_overrides, certainty 0)
        BioParameter: AVBL_to_VB10_elec_syn_gbase = 0.001 nS (SRC: Add with param_overrides, certainty 0)
        BioParameter: AVBL_to_VB11_elec_syn_gbase = 0.001 nS (SRC: Add with param_overrides, certainty 0)
        BioParameter: AVBL_to_VB1_elec_syn_gbase = 0.001 nS (SRC: Add with param_overrides, certainty 0)
        BioParameter: AVBL_to_VB2_elec_syn_gbase = 0.001 nS (SRC: Add with param_overrides, certainty 0)
        BioParameter: AVBL_to_VB2_exc_syn_conductance = 0 nS (SRC: Add with param_overrides, certainty 0)
        BioParameter: AVBL_to_VB4_elec_syn_gbase = 0.001 nS (SRC: Add with param_overrides, certainty 0)
        BioParameter: AVBL_to_VB5_elec_syn_gbase = 0.001 nS (SRC: Add with param_overrides, certainty 0)
        BioParameter: AVBL_to_VB6_elec_syn_gbase = 0.001 nS (SRC: Add with param_overrides, certainty 0)
        BioParameter: AVBL_to_VB7_elec_syn_gbase = 0.001 nS (SRC: Add with param_overrides, certainty 0)
        BioParameter: AVBL_to_VB8_elec_syn_gbase = 0.001 nS (SRC: Add with param_overrides, certainty 0)
        BioParameter: AVBL_to_VB9_elec_syn_gbase = 0.001 nS (SRC: Add with param_overrides, certainty 0)
        BioParameter: AVBR_to_DB1_elec_syn_gbase = 0.001 nS (SRC: Add with param_overrides, certainty 0)
        BioParameter: AVBR_to_DB2_elec_syn_gbase = 0.001 nS (SRC: Add with param_overrides, certainty 0)
        BioParameter: AVBR_to_DB3_elec_syn_gbase = 0.001 nS (SRC: Add with param_overrides, certainty 0)
        BioParameter: AVBR_to_DB4_elec_syn_gbase = 0.001 nS (SRC: Add with param_overrides, certainty 0)
        BioParameter: AVBR_to_DB4_exc_syn_conductance = 0 nS (SRC: Add with param_overrides, certainty 0)
        BioParameter: AVBR_to_DB5_elec_syn_gbase = 0.001 nS (SRC: Add with param_overrides, certainty 0)
        BioParameter: AVBR_to_DB6_elec_syn_gbase = 0.001 nS (SRC: Add with param_overrides, certainty 0)
        BioParameter: AVBR_to_DB7_elec_syn_gbase = 0.001 nS (SRC: Add with param_overrides, certainty 0)
        BioParameter: AVBR_to_MVL16_exc_syn_conductance = 0 nS (SRC: Add with param_overrides, certainty 0)
        BioParameter: AVBR_to_VB10_elec_syn_gbase = 0.001 nS (SRC: Add with param_overrides, certainty 0)
        BioParameter: AVBR_to_VB11_elec_syn_gbase = 0.001 nS (SRC: Add with param_overrides, certainty 0)
        BioParameter: AVBR_to_VB2_elec_syn_gbase = 0.001 nS (SRC: Add with param_overrides, certainty 0)
        BioParameter: AVBR_to_VB3_elec_syn_gbase = 0.001 nS (SRC: Add with param_overrides, certainty 0)
        BioParameter: AVBR_to_VB4_elec_syn_gbase = 0.001 nS (SRC: Add with param_overrides, certainty 0)
        BioParameter: AVBR_to_VB6_elec_syn_gbase = 0.001 nS (SRC: Add with param_overrides, certainty 0)
        BioParameter: AVBR_to_VB7_elec_syn_gbase = 0.001 nS (SRC: Add with param_overrides, certainty 0)
        BioParameter: AVBR_to_VB8_elec_syn_gbase = 0.001 nS (SRC: Add with param_overrides, certainty 0)
        BioParameter: AVBR_to_VB9_elec_syn_gbase = 0.001 nS (SRC: Add with param_overrides, certainty 0)
        BioParameter: AVBR_to_VD3_exc_syn_conductance = 0 nS (SRC: Add with param_overrides, certainty 0)
        BioParameter: DB1_to_AVBR_elec_syn_gbase = 0.001 nS (SRC: Add with param_overrides, certainty 0)
        BioParameter: DB1_to_DB2_elec_syn_gbase = 0.001 nS (SRC: Set with param_overrides, certainty 0)
        BioParameter: DB1_to_DB4_elec_syn_gbase = 0.001 nS (SRC: Set with param_overrides, certainty 0)
        BioParameter: DB1_to_MDL07_exc_syn_conductance = 0.4 nS (SRC: Add with param_overrides, certainty 0)
        BioParameter: DB1_to_MDL08_exc_syn_conductance = 0.4 nS (SRC: Add with param_overrides, certainty 0)
        BioParameter: DB1_to_MDR07_exc_syn_conductance = 0.4 nS (SRC: Add with param_overrides, certainty 0)
        BioParameter: DB1_to_MDR08_exc_syn_conductance = 0.4 nS (SRC: Add with param_overrides, certainty 0)
        BioParameter: DB1_to_VB3_elec_syn_gbase = 0 nS (SRC: Add with param_overrides, certainty 0)
        BioParameter: DB1_to_VB4_elec_syn_gbase = 0 nS (SRC: Add with param_overrides, certainty 0)
        BioParameter: DB2_to_AVBR_elec_syn_gbase = 0.001 nS (SRC: Add with param_overrides, certainty 0)
        BioParameter: DB2_to_DB1_elec_syn_gbase = 0.001 nS (SRC: Set with param_overrides, certainty 0)
        BioParameter: DB2_to_DB3_elec_syn_gbase = 0.001 nS (SRC: Set with param_overrides, certainty 0)
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    -->

    <Target component="sim_c302_A_FW" />

    <!-- Include core NeuroML2 ComponentType definitions -->

    <Include file="Cells.xml" />
    <Include file="Networks.xml" />
    <Include file="Simulation.xml" />

    <Include file="c302_A_FW.net.nml" />

    <!-- End of NeuroML2 content -->

    <Simulation id="sim_c302_A_FW" length="2000ms" step="0.05ms" target="c302_A_FW">

        <Display id="neurons" title="c302_A_FW: Membrane potential of a number of neurons" timeScale="1ms" xmin="-200.0" xmax="2200.0" ymin="-52" ymax="-28">

            <Line id="AVBL" quantity="AVBL/0/generic_neuron_iaf_cell/v" scale="1mV" color="#e13b00" timeScale="1ms" />
            <Line id="AVBR" quantity="AVBR/0/generic_neuron_iaf_cell/v" scale="1mV" color="#2e112a" timeScale="1ms" />
            <Line id="DB1" quantity="DB1/0/generic_neuron_iaf_cell/v" scale="1mV" color="#32b579" timeScale="1ms" />
            <Line id="DB2" quantity="DB2/0/generic_neuron_iaf_cell/v" scale="1mV" color="#000000" timeScale="1ms" />
            <Line id="DB3" quantity="DB3/0/generic_neuron_iaf_cell/v" scale="1mV" color="#b1f7ed" timeScale="1ms" />
            <Line id="DB4" quantity="DB4/0/generic_neuron_iaf_cell/v" scale="1mV" color="#4c2e5d" timeScale="1ms" />
            <Line id="DB5" quantity="DB5/0/generic_neuron_iaf_cell/v" scale="1mV" color="#3a00f9" timeScale="1ms" />
            <Line id="DB6" quantity="DB6/0/generic_neuron_iaf_cell/v" scale="1mV" color="#7f21ee" timeScale="1ms" />
            <Line id="DB7" quantity="DB7/0/generic_neuron_iaf_cell/v" scale="1mV" color="#232d17" timeScale="1ms" />
            <Line id="DD1" quantity="DD1/0/generic_neuron_iaf_cell/v" scale="1mV" color="#8a209a" timeScale="1ms" />
            <Line id="DD2" quantity="DD2/0/generic_neuron_iaf_cell/v" scale="1mV" color="#f6b588" timeScale="1ms" />
            <Line id="DD3" quantity="DD3/0/generic_neuron_iaf_cell/v" scale="1mV" color="#7f66e8" timeScale="1ms" />
            <Line id="DD4" quantity="DD4/0/generic_neuron_iaf_cell/v" scale="1mV" color="#002400" timeScale="1ms" />
            <Line id="DD5" quantity="DD5/0/generic_neuron_iaf_cell/v" scale="1mV" color="#aa49f2" timeScale="1ms" />
            <Line id="DD6" quantity="DD6/0/generic_neuron_iaf_cell/v" scale="1mV" color="#c1551b" timeScale="1ms" />
            <Line id="VB1" quantity="VB1/0/generic_neuron_iaf_cell/v" scale="1mV" color="#27fe53" timeScale="1ms" />
            <Line id="VB10" quantity="VB10/0/generic_neuron_iaf_cell/v" scale="1mV" color="#266e49" timeScale="1ms" />
            <Line id="VB11" quantity="VB11/0/generic_neuron_iaf_cell/v" scale="1mV" color="#00b138" timeScale="1ms" />
            <Line id="VB2" quantity="VB2/0/generic_neuron_iaf_cell/v" scale="1mV" color="#489ce8" timeScale="1ms" />
            <Line id="VB3" quantity="VB3/0/generic_neuron_iaf_cell/v" scale="1mV" color="#14d58d" timeScale="1ms" />
            <Line id="VB4" quantity="VB4/0/generic_neuron_iaf_cell/v" scale="1mV" color="#145a8b" timeScale="1ms" />
            <Line id="VB5" quantity="VB5/0/generic_neuron_iaf_cell/v" scale="1mV" color="#4f994f" timeScale="1ms" />
            <Line id="VB6" quantity="VB6/0/generic_neuron_iaf_cell/v" scale="1mV" color="#ed15c5" timeScale="1ms" />
            <Line id="VB7" quantity="VB7/0/generic_neuron_iaf_cell/v" scale="1mV" color="#b2fdae" timeScale="1ms" />
            <Line id="VB8" quantity="VB8/0/generic_neuron_iaf_cell/v" scale="1mV" color="#eff317" timeScale="1ms" />
            <Line id="VB9" quantity="VB9/0/generic_neuron_iaf_cell/v" scale="1mV" color="#f157e1" timeScale="1ms" />
            <Line id="VD1" quantity="VD1/0/generic_neuron_iaf_cell/v" scale="1mV" color="#e0978c" timeScale="1ms" />
            <Line id="VD10" quantity="VD10/0/generic_neuron_iaf_cell/v" scale="1mV" color="#3f5fd5" timeScale="1ms" />
            <Line id="VD11" quantity="VD11/0/generic_neuron_iaf_cell/v" scale="1mV" color="#df3d34" timeScale="1ms" />
            <Line id="VD12" quantity="VD12/0/generic_neuron_iaf_cell/v" scale="1mV" color="#f8c082" timeScale="1ms" />
            <Line id="VD13" quantity="VD13/0/generic_neuron_iaf_cell/v" scale="1mV" color="#62b037" timeScale="1ms" />
            <Line id="VD2" quantity="VD2/0/generic_neuron_iaf_cell/v" scale="1mV" color="#50894f" timeScale="1ms" />
            <Line id="VD3" quantity="VD3/0/generic_neuron_iaf_cell/v" scale="1mV" color="#a5e424" timeScale="1ms" />
            <Line id="VD4" quantity="VD4/0/generic_neuron_iaf_cell/v" scale="1mV" color="#28ca6d" timeScale="1ms" />
            <Line id="VD5" quantity="VD5/0/generic_neuron_iaf_cell/v" scale="1mV" color="#189213" timeScale="1ms" />
            <Line id="VD6" quantity="VD6/0/generic_neuron_iaf_cell/v" scale="1mV" color="#702ca2" timeScale="1ms" />
            <Line id="VD7" quantity="VD7/0/generic_neuron_iaf_cell/v" scale="1mV" color="#9ceb21" timeScale="1ms" />
            <Line id="VD8" quantity="VD8/0/generic_neuron_iaf_cell/v" scale="1mV" color="#8325da" timeScale="1ms" />
            <Line id="VD9" quantity="VD9/0/generic_neuron_iaf_cell/v" scale="1mV" color="#6733cb" timeScale="1ms" />

        </Display>

        <Display id="muscles" title="c302_A_FW: Membrane potential of a number of muscles" timeScale="1ms" xmin="-200.0" xmax="2200.0" ymin="-52" ymax="-28">

            <Line id="MDL01" quantity="MDL01/0/generic_muscle_iaf_cell/v" scale="1mV" color="#63eb00" timeScale="1ms" />
            <Line id="MDL02" quantity="MDL02/0/generic_muscle_iaf_cell/v" scale="1mV" color="#78b869" timeScale="1ms" />
            <Line id="MDL03" quantity="MDL03/0/generic_muscle_iaf_cell/v" scale="1mV" color="#d75968" timeScale="1ms" />
            <Line id="MDL04" quantity="MDL04/0/generic_muscle_iaf_cell/v" scale="1mV" color="#9a1eb4" timeScale="1ms" />
            <Line id="MDL05" quantity="MDL05/0/generic_muscle_iaf_cell/v" scale="1mV" color="#4efff1" timeScale="1ms" />
            <Line id="MDL06" quantity="MDL06/0/generic_muscle_iaf_cell/v" scale="1mV" color="#aa4743" timeScale="1ms" />
            <Line id="MDL07" quantity="MDL07/0/generic_muscle_iaf_cell/v" scale="1mV" color="#18544a" timeScale="1ms" />
            <Line id="MDL08" quantity="MDL08/0/generic_muscle_iaf_cell/v" scale="1mV" color="#23a657" timeScale="1ms" />
            <Line id="MDL09" quantity="MDL09/0/generic_muscle_iaf_cell/v" scale="1mV" color="#001f2c" timeScale="1ms" />
            <Line id="MDL10" quantity="MDL10/0/generic_muscle_iaf_cell/v" scale="1mV" color="#4b6f14" timeScale="1ms" />
            <Line id="MDL11" quantity="MDL11/0/generic_muscle_iaf_cell/v" scale="1mV" color="#ddc8a6" timeScale="1ms" />
            <Line id="MDL12" quantity="MDL12/0/generic_muscle_iaf_cell/v" scale="1mV" color="#6ac38f" timeScale="1ms" />
            <Line id="MDL13" quantity="MDL13/0/generic_muscle_iaf_cell/v" scale="1mV" color="#9bd8a3" timeScale="1ms" />
            <Line id="MDL14" quantity="MDL14/0/generic_muscle_iaf_cell/v" scale="1mV" color="#4d2f85" timeScale="1ms" />
            <Line id="MDL15" quantity="MDL15/0/generic_muscle_iaf_cell/v" scale="1mV" color="#8ed2cc" timeScale="1ms" />
            <Line id="MDL16" quantity="MDL16/0/generic_muscle_iaf_cell/v" scale="1mV" color="#8d3ac0" timeScale="1ms" />
            <Line id="MDL17" quantity="MDL17/0/generic_muscle_iaf_cell/v" scale="1mV" color="#8c6d98" timeScale="1ms" />
            <Line id="MDL18" quantity="MDL18/0/generic_muscle_iaf_cell/v" scale="1mV" color="#cb1ab2" timeScale="1ms" />
            <Line id="MDL19" quantity="MDL19/0/generic_muscle_iaf_cell/v" scale="1mV" color="#e177fb" timeScale="1ms" />
            <Line id="MDL20" quantity="MDL20/0/generic_muscle_iaf_cell/v" scale="1mV" color="#54c29d" timeScale="1ms" />
            <Line id="MDL21" quantity="MDL21/0/generic_muscle_iaf_cell/v" scale="1mV" color="#0025f5" timeScale="1ms" />
            <Line id="MDL22" quantity="MDL22/0/generic_muscle_iaf_cell/v" scale="1mV" color="#ca98db" timeScale="1ms" />
            <Line id="MDL23" quantity="MDL23/0/generic_muscle_iaf_cell/v" scale="1mV" color="#f55fcd" timeScale="1ms" />
            <Line id="MDL24" quantity="MDL24/0/generic_muscle_iaf_cell/v" scale="1mV" color="#f45090" timeScale="1ms" />
            <Line id="MDR01" quantity="MDR01/0/generic_muscle_iaf_cell/v" scale="1mV" color="#bdb169" timeScale="1ms" />
            <Line id="MDR02" quantity="MDR02/0/generic_muscle_iaf_cell/v" scale="1mV" color="#56eaf2" timeScale="1ms" />
            <Line id="MDR03" quantity="MDR03/0/generic_muscle_iaf_cell/v" scale="1mV" color="#00ef35" timeScale="1ms" />
            <Line id="MDR04" quantity="MDR04/0/generic_muscle_iaf_cell/v" scale="1mV" color="#00bbf3" timeScale="1ms" />
            <Line id="MDR05" quantity="MDR05/0/generic_muscle_iaf_cell/v" scale="1mV" color="#2147a9" timeScale="1ms" />
            <Line id="MDR06" quantity="MDR06/0/generic_muscle_iaf_cell/v" scale="1mV" color="#b29498" timeScale="1ms" />
            <Line id="MDR07" quantity="MDR07/0/generic_muscle_iaf_cell/v" scale="1mV" color="#a99663" timeScale="1ms" />
            <Line id="MDR08" quantity="MDR08/0/generic_muscle_iaf_cell/v" scale="1mV" color="#8e2568" timeScale="1ms" />
            <Line id="MDR09" quantity="MDR09/0/generic_muscle_iaf_cell/v" scale="1mV" color="#adaba4" timeScale="1ms" />
            <Line id="MDR10" quantity="MDR10/0/generic_muscle_iaf_cell/v" scale="1mV" color="#ea882b" timeScale="1ms" />
            <Line id="MDR11" quantity="MDR11/0/generic_muscle_iaf_cell/v" scale="1mV" color="#3d7d83" timeScale="1ms" />
            <Line id="MDR12" quantity="MDR12/0/generic_muscle_iaf_cell/v" scale="1mV" color="#be4600" timeScale="1ms" />
            <Line id="MDR13" quantity="MDR13/0/generic_muscle_iaf_cell/v" scale="1mV" color="#ca1316" timeScale="1ms" />
            <Line id="MDR14" quantity="MDR14/0/generic_muscle_iaf_cell/v" scale="1mV" color="#6a4fa0" timeScale="1ms" />
            <Line id="MDR15" quantity="MDR15/0/generic_muscle_iaf_cell/v" scale="1mV" color="#b5de23" timeScale="1ms" />
            <Line id="MDR16" quantity="MDR16/0/generic_muscle_iaf_cell/v" scale="1mV" color="#9c85f8" timeScale="1ms" />
            <Line id="MDR17" quantity="MDR17/0/generic_muscle_iaf_cell/v" scale="1mV" color="#70b22a" timeScale="1ms" />
            <Line id="MDR18" quantity="MDR18/0/generic_muscle_iaf_cell/v" scale="1mV" color="#00a975" timeScale="1ms" />
            <Line id="MDR19" quantity="MDR19/0/generic_muscle_iaf_cell/v" scale="1mV" color="#53f4ff" timeScale="1ms" />
            <Line id="MDR20" quantity="MDR20/0/generic_muscle_iaf_cell/v" scale="1mV" color="#47224a" timeScale="1ms" />
            <Line id="MDR21" quantity="MDR21/0/generic_muscle_iaf_cell/v" scale="1mV" color="#7c54c9" timeScale="1ms" />
            <Line id="MDR22" quantity="MDR22/0/generic_muscle_iaf_cell/v" scale="1mV" color="#a742e4" timeScale="1ms" />
            <Line id="MDR23" quantity="MDR23/0/generic_muscle_iaf_cell/v" scale="1mV" color="#14be23" timeScale="1ms" />
            <Line id="MDR24" quantity="MDR24/0/generic_muscle_iaf_cell/v" scale="1mV" color="#bcd116" timeScale="1ms" />
            <Line id="MVL01" quantity="MVL01/0/generic_muscle_iaf_cell/v" scale="1mV" color="#24a074" timeScale="1ms" />
            <Line id="MVL02" quantity="MVL02/0/generic_muscle_iaf_cell/v" scale="1mV" color="#65b1c2" timeScale="1ms" />
            <Line id="MVL03" quantity="MVL03/0/generic_muscle_iaf_cell/v" scale="1mV" color="#fc1a00" timeScale="1ms" />
            <Line id="MVL04" quantity="MVL04/0/generic_muscle_iaf_cell/v" scale="1mV" color="#e52996" timeScale="1ms" />
            <Line id="MVL05" quantity="MVL05/0/generic_muscle_iaf_cell/v" scale="1mV" color="#daae4b" timeScale="1ms" />
            <Line id="MVL06" quantity="MVL06/0/generic_muscle_iaf_cell/v" scale="1mV" color="#f87b00" timeScale="1ms" />
            <Line id="MVL07" quantity="MVL07/0/generic_muscle_iaf_cell/v" scale="1mV" color="#b6bed4" timeScale="1ms" />
            <Line id="MVL08" quantity="MVL08/0/generic_muscle_iaf_cell/v" scale="1mV" color="#592600" timeScale="1ms" />
            <Line id="MVL09" quantity="MVL09/0/generic_muscle_iaf_cell/v" scale="1mV" color="#6c6448" timeScale="1ms" />
            <Line id="MVL10" quantity="MVL10/0/generic_muscle_iaf_cell/v" scale="1mV" color="#004382" timeScale="1ms" />
            <Line id="MVL11" quantity="MVL11/0/generic_muscle_iaf_cell/v" scale="1mV" color="#19efb9" timeScale="1ms" />
            <Line id="MVL12" quantity="MVL12/0/generic_muscle_iaf_cell/v" scale="1mV" color="#be93cb" timeScale="1ms" />
            <Line id="MVL13" quantity="MVL13/0/generic_muscle_iaf_cell/v" scale="1mV" color="#d0bc77" timeScale="1ms" />
            <Line id="MVL14" quantity="MVL14/0/generic_muscle_iaf_cell/v" scale="1mV" color="#9200a0" timeScale="1ms" />
            <Line id="MVL15" quantity="MVL15/0/generic_muscle_iaf_cell/v" scale="1mV" color="#883d12" timeScale="1ms" />
            <Line id="MVL16" quantity="MVL16/0/generic_muscle_iaf_cell/v" scale="1mV" color="#6fbd5e" timeScale="1ms" />
            <Line id="MVL17" quantity="MVL17/0/generic_muscle_iaf_cell/v" scale="1mV" color="#a495b9" timeScale="1ms" />
            <Line id="MVL18" quantity="MVL18/0/generic_muscle_iaf_cell/v" scale="1mV" color="#8b5ae9" timeScale="1ms" />
            <Line id="MVL19" quantity="MVL19/0/generic_muscle_iaf_cell/v" scale="1mV" color="#5600d1" timeScale="1ms" />
            <Line id="MVL20" quantity="MVL20/0/generic_muscle_iaf_cell/v" scale="1mV" color="#7a62e3" timeScale="1ms" />
            <Line id="MVL21" quantity="MVL21/0/generic_muscle_iaf_cell/v" scale="1mV" color="#8b59b5" timeScale="1ms" />
            <Line id="MVL22" quantity="MVL22/0/generic_muscle_iaf_cell/v" scale="1mV" color="#d1f8f6" timeScale="1ms" />
            <Line id="MVL23" quantity="MVL23/0/generic_muscle_iaf_cell/v" scale="1mV" color="#f5e3be" timeScale="1ms" />
            <Line id="MVR01" quantity="MVR01/0/generic_muscle_iaf_cell/v" scale="1mV" color="#34cd41" timeScale="1ms" />
            <Line id="MVR02" quantity="MVR02/0/generic_muscle_iaf_cell/v" scale="1mV" color="#36f0f9" timeScale="1ms" />
            <Line id="MVR03" quantity="MVR03/0/generic_muscle_iaf_cell/v" scale="1mV" color="#314383" timeScale="1ms" />
            <Line id="MVR04" quantity="MVR04/0/generic_muscle_iaf_cell/v" scale="1mV" color="#7a24ab" timeScale="1ms" />
            <Line id="MVR05" quantity="MVR05/0/generic_muscle_iaf_cell/v" scale="1mV" color="#c896b5" timeScale="1ms" />
            <Line id="MVR06" quantity="MVR06/0/generic_muscle_iaf_cell/v" scale="1mV" color="#cf60f2" timeScale="1ms" />
            <Line id="MVR07" quantity="MVR07/0/generic_muscle_iaf_cell/v" scale="1mV" color="#eea3e2" timeScale="1ms" />
            <Line id="MVR08" quantity="MVR08/0/generic_muscle_iaf_cell/v" scale="1mV" color="#37ed2b" timeScale="1ms" />
            <Line id="MVR09" quantity="MVR09/0/generic_muscle_iaf_cell/v" scale="1mV" color="#26655a" timeScale="1ms" />
            <Line id="MVR10" quantity="MVR10/0/generic_muscle_iaf_cell/v" scale="1mV" color="#ab58c1" timeScale="1ms" />
            <Line id="MVR11" quantity="MVR11/0/generic_muscle_iaf_cell/v" scale="1mV" color="#8b6687" timeScale="1ms" />
            <Line id="MVR12" quantity="MVR12/0/generic_muscle_iaf_cell/v" scale="1mV" color="#0050a1" timeScale="1ms" />
            <Line id="MVR13" quantity="MVR13/0/generic_muscle_iaf_cell/v" scale="1mV" color="#33171c" timeScale="1ms" />
            <Line id="MVR14" quantity="MVR14/0/generic_muscle_iaf_cell/v" scale="1mV" color="#85d9a5" timeScale="1ms" />
            <Line id="MVR15" quantity="MVR15/0/generic_muscle_iaf_cell/v" scale="1mV" color="#ae9dde" timeScale="1ms" />
            <Line id="MVR16" quantity="MVR16/0/generic_muscle_iaf_cell/v" scale="1mV" color="#55c0ca" timeScale="1ms" />
            <Line id="MVR17" quantity="MVR17/0/generic_muscle_iaf_cell/v" scale="1mV" color="#009491" timeScale="1ms" />
            <Line id="MVR18" quantity="MVR18/0/generic_muscle_iaf_cell/v" scale="1mV" color="#a27f4f" timeScale="1ms" />
            <Line id="MVR19" quantity="MVR19/0/generic_muscle_iaf_cell/v" scale="1mV" color="#63e7e3" timeScale="1ms" />
            <Line id="MVR20" quantity="MVR20/0/generic_muscle_iaf_cell/v" scale="1mV" color="#d500ac" timeScale="1ms" />
            <Line id="MVR21" quantity="MVR21/0/generic_muscle_iaf_cell/v" scale="1mV" color="#89dec8" timeScale="1ms" />
            <Line id="MVR22" quantity="MVR22/0/generic_muscle_iaf_cell/v" scale="1mV" color="#84fca1" timeScale="1ms" />
            <Line id="MVR23" quantity="MVR23/0/generic_muscle_iaf_cell/v" scale="1mV" color="#7e9250" timeScale="1ms" />
            <Line id="MVR24" quantity="MVR24/0/generic_muscle_iaf_cell/v" scale="1mV" color="#53d250" timeScale="1ms" />

        </Display>

        <OutputFile id="neurons_v" fileName="c302_A_FW.dat">
            <OutputColumn id="AVBL_v" quantity="AVBL/0/generic_neuron_iaf_cell/v"/>
            <OutputColumn id="AVBR_v" quantity="AVBR/0/generic_neuron_iaf_cell/v"/>
            <OutputColumn id="DB1_v" quantity="DB1/0/generic_neuron_iaf_cell/v"/>
            <OutputColumn id="DB2_v" quantity="DB2/0/generic_neuron_iaf_cell/v"/>
            <OutputColumn id="DB3_v" quantity="DB3/0/generic_neuron_iaf_cell/v"/>
            <OutputColumn id="DB4_v" quantity="DB4/0/generic_neuron_iaf_cell/v"/>
            <OutputColumn id="DB5_v" quantity="DB5/0/generic_neuron_iaf_cell/v"/>
            <OutputColumn id="DB6_v" quantity="DB6/0/generic_neuron_iaf_cell/v"/>
            <OutputColumn id="DB7_v" quantity="DB7/0/generic_neuron_iaf_cell/v"/>
            <OutputColumn id="DD1_v" quantity="DD1/0/generic_neuron_iaf_cell/v"/>
            <OutputColumn id="DD2_v" quantity="DD2/0/generic_neuron_iaf_cell/v"/>
            <OutputColumn id="DD3_v" quantity="DD3/0/generic_neuron_iaf_cell/v"/>
            <OutputColumn id="DD4_v" quantity="DD4/0/generic_neuron_iaf_cell/v"/>
            <OutputColumn id="DD5_v" quantity="DD5/0/generic_neuron_iaf_cell/v"/>
            <OutputColumn id="DD6_v" quantity="DD6/0/generic_neuron_iaf_cell/v"/>
            <OutputColumn id="VB1_v" quantity="VB1/0/generic_neuron_iaf_cell/v"/>
            <OutputColumn id="VB10_v" quantity="VB10/0/generic_neuron_iaf_cell/v"/>
            <OutputColumn id="VB11_v" quantity="VB11/0/generic_neuron_iaf_cell/v"/>
            <OutputColumn id="VB2_v" quantity="VB2/0/generic_neuron_iaf_cell/v"/>
            <OutputColumn id="VB3_v" quantity="VB3/0/generic_neuron_iaf_cell/v"/>
            <OutputColumn id="VB4_v" quantity="VB4/0/generic_neuron_iaf_cell/v"/>
            <OutputColumn id="VB5_v" quantity="VB5/0/generic_neuron_iaf_cell/v"/>
            <OutputColumn id="VB6_v" quantity="VB6/0/generic_neuron_iaf_cell/v"/>
            <OutputColumn id="VB7_v" quantity="VB7/0/generic_neuron_iaf_cell/v"/>
            <OutputColumn id="VB8_v" quantity="VB8/0/generic_neuron_iaf_cell/v"/>
            <OutputColumn id="VB9_v" quantity="VB9/0/generic_neuron_iaf_cell/v"/>
            <OutputColumn id="VD1_v" quantity="VD1/0/generic_neuron_iaf_cell/v"/>
            <OutputColumn id="VD10_v" quantity="VD10/0/generic_neuron_iaf_cell/v"/>
            <OutputColumn id="VD11_v" quantity="VD11/0/generic_neuron_iaf_cell/v"/>
            <OutputColumn id="VD12_v" quantity="VD12/0/generic_neuron_iaf_cell/v"/>
            <OutputColumn id="VD13_v" quantity="VD13/0/generic_neuron_iaf_cell/v"/>
            <OutputColumn id="VD2_v" quantity="VD2/0/generic_neuron_iaf_cell/v"/>
            <OutputColumn id="VD3_v" quantity="VD3/0/generic_neuron_iaf_cell/v"/>
            <OutputColumn id="VD4_v" quantity="VD4/0/generic_neuron_iaf_cell/v"/>
            <OutputColumn id="VD5_v" quantity="VD5/0/generic_neuron_iaf_cell/v"/>
            <OutputColumn id="VD6_v" quantity="VD6/0/generic_neuron_iaf_cell/v"/>
            <OutputColumn id="VD7_v" quantity="VD7/0/generic_neuron_iaf_cell/v"/>
            <OutputColumn id="VD8_v" quantity="VD8/0/generic_neuron_iaf_cell/v"/>
            <OutputColumn id="VD9_v" quantity="VD9/0/generic_neuron_iaf_cell/v"/>
        </OutputFile>

        <OutputFile id="muscles_v" fileName="c302_A_FW.muscles.dat">
            <OutputColumn id="MDL01_v" quantity="MDL01/0/generic_muscle_iaf_cell/v"/>
            <OutputColumn id="MDL02_v" quantity="MDL02/0/generic_muscle_iaf_cell/v"/>
            <OutputColumn id="MDL03_v" quantity="MDL03/0/generic_muscle_iaf_cell/v"/>
            <OutputColumn id="MDL04_v" quantity="MDL04/0/generic_muscle_iaf_cell/v"/>
            <OutputColumn id="MDL05_v" quantity="MDL05/0/generic_muscle_iaf_cell/v"/>
            <OutputColumn id="MDL06_v" quantity="MDL06/0/generic_muscle_iaf_cell/v"/>
            <OutputColumn id="MDL07_v" quantity="MDL07/0/generic_muscle_iaf_cell/v"/>
            <OutputColumn id="MDL08_v" quantity="MDL08/0/generic_muscle_iaf_cell/v"/>
            <OutputColumn id="MDL09_v" quantity="MDL09/0/generic_muscle_iaf_cell/v"/>
            <OutputColumn id="MDL10_v" quantity="MDL10/0/generic_muscle_iaf_cell/v"/>
            <OutputColumn id="MDL11_v" quantity="MDL11/0/generic_muscle_iaf_cell/v"/>
            <OutputColumn id="MDL12_v" quantity="MDL12/0/generic_muscle_iaf_cell/v"/>
            <OutputColumn id="MDL13_v" quantity="MDL13/0/generic_muscle_iaf_cell/v"/>
            <OutputColumn id="MDL14_v" quantity="MDL14/0/generic_muscle_iaf_cell/v"/>
            <OutputColumn id="MDL15_v" quantity="MDL15/0/generic_muscle_iaf_cell/v"/>
            <OutputColumn id="MDL16_v" quantity="MDL16/0/generic_muscle_iaf_cell/v"/>
            <OutputColumn id="MDL17_v" quantity="MDL17/0/generic_muscle_iaf_cell/v"/>
            <OutputColumn id="MDL18_v" quantity="MDL18/0/generic_muscle_iaf_cell/v"/>
            <OutputColumn id="MDL19_v" quantity="MDL19/0/generic_muscle_iaf_cell/v"/>
            <OutputColumn id="MDL20_v" quantity="MDL20/0/generic_muscle_iaf_cell/v"/>
            <OutputColumn id="MDL21_v" quantity="MDL21/0/generic_muscle_iaf_cell/v"/>
            <OutputColumn id="MDL22_v" quantity="MDL22/0/generic_muscle_iaf_cell/v"/>
            <OutputColumn id="MDL23_v" quantity="MDL23/0/generic_muscle_iaf_cell/v"/>
            <OutputColumn id="MDL24_v" quantity="MDL24/0/generic_muscle_iaf_cell/v"/>
            <OutputColumn id="MDR01_v" quantity="MDR01/0/generic_muscle_iaf_cell/v"/>
            <OutputColumn id="MDR02_v" quantity="MDR02/0/generic_muscle_iaf_cell/v"/>
            <OutputColumn id="MDR03_v" quantity="MDR03/0/generic_muscle_iaf_cell/v"/>
            <OutputColumn id="MDR04_v" quantity="MDR04/0/generic_muscle_iaf_cell/v"/>
            <OutputColumn id="MDR05_v" quantity="MDR05/0/generic_muscle_iaf_cell/v"/>
            <OutputColumn id="MDR06_v" quantity="MDR06/0/generic_muscle_iaf_cell/v"/>
            <OutputColumn id="MDR07_v" quantity="MDR07/0/generic_muscle_iaf_cell/v"/>
            <OutputColumn id="MDR08_v" quantity="MDR08/0/generic_muscle_iaf_cell/v"/>
            <OutputColumn id="MDR09_v" quantity="MDR09/0/generic_muscle_iaf_cell/v"/>
            <OutputColumn id="MDR10_v" quantity="MDR10/0/generic_muscle_iaf_cell/v"/>
            <OutputColumn id="MDR11_v" quantity="MDR11/0/generic_muscle_iaf_cell/v"/>
            <OutputColumn id="MDR12_v" quantity="MDR12/0/generic_muscle_iaf_cell/v"/>
            <OutputColumn id="MDR13_v" quantity="MDR13/0/generic_muscle_iaf_cell/v"/>
            <OutputColumn id="MDR14_v" quantity="MDR14/0/generic_muscle_iaf_cell/v"/>
            <OutputColumn id="MDR15_v" quantity="MDR15/0/generic_muscle_iaf_cell/v"/>
            <OutputColumn id="MDR16_v" quantity="MDR16/0/generic_muscle_iaf_cell/v"/>
            <OutputColumn id="MDR17_v" quantity="MDR17/0/generic_muscle_iaf_cell/v"/>
            <OutputColumn id="MDR18_v" quantity="MDR18/0/generic_muscle_iaf_cell/v"/>
            <OutputColumn id="MDR19_v" quantity="MDR19/0/generic_muscle_iaf_cell/v"/>
            <OutputColumn id="MDR20_v" quantity="MDR20/0/generic_muscle_iaf_cell/v"/>
            <OutputColumn id="MDR21_v" quantity="MDR21/0/generic_muscle_iaf_cell/v"/>
            <OutputColumn id="MDR22_v" quantity="MDR22/0/generic_muscle_iaf_cell/v"/>
            <OutputColumn id="MDR23_v" quantity="MDR23/0/generic_muscle_iaf_cell/v"/>
            <OutputColumn id="MDR24_v" quantity="MDR24/0/generic_muscle_iaf_cell/v"/>
            <OutputColumn id="MVL01_v" quantity="MVL01/0/generic_muscle_iaf_cell/v"/>
            <OutputColumn id="MVL02_v" quantity="MVL02/0/generic_muscle_iaf_cell/v"/>
            <OutputColumn id="MVL03_v" quantity="MVL03/0/generic_muscle_iaf_cell/v"/>
            <OutputColumn id="MVL04_v" quantity="MVL04/0/generic_muscle_iaf_cell/v"/>
            <OutputColumn id="MVL05_v" quantity="MVL05/0/generic_muscle_iaf_cell/v"/>
            <OutputColumn id="MVL06_v" quantity="MVL06/0/generic_muscle_iaf_cell/v"/>
            <OutputColumn id="MVL07_v" quantity="MVL07/0/generic_muscle_iaf_cell/v"/>
            <OutputColumn id="MVL08_v" quantity="MVL08/0/generic_muscle_iaf_cell/v"/>
            <OutputColumn id="MVL09_v" quantity="MVL09/0/generic_muscle_iaf_cell/v"/>
            <OutputColumn id="MVL10_v" quantity="MVL10/0/generic_muscle_iaf_cell/v"/>
            <OutputColumn id="MVL11_v" quantity="MVL11/0/generic_muscle_iaf_cell/v"/>
            <OutputColumn id="MVL12_v" quantity="MVL12/0/generic_muscle_iaf_cell/v"/>
            <OutputColumn id="MVL13_v" quantity="MVL13/0/generic_muscle_iaf_cell/v"/>
            <OutputColumn id="MVL14_v" quantity="MVL14/0/generic_muscle_iaf_cell/v"/>
            <OutputColumn id="MVL15_v" quantity="MVL15/0/generic_muscle_iaf_cell/v"/>
            <OutputColumn id="MVL16_v" quantity="MVL16/0/generic_muscle_iaf_cell/v"/>
            <OutputColumn id="MVL17_v" quantity="MVL17/0/generic_muscle_iaf_cell/v"/>
            <OutputColumn id="MVL18_v" quantity="MVL18/0/generic_muscle_iaf_cell/v"/>
            <OutputColumn id="MVL19_v" quantity="MVL19/0/generic_muscle_iaf_cell/v"/>
            <OutputColumn id="MVL20_v" quantity="MVL20/0/generic_muscle_iaf_cell/v"/>
            <OutputColumn id="MVL21_v" quantity="MVL21/0/generic_muscle_iaf_cell/v"/>
            <OutputColumn id="MVL22_v" quantity="MVL22/0/generic_muscle_iaf_cell/v"/>
            <OutputColumn id="MVL23_v" quantity="MVL23/0/generic_muscle_iaf_cell/v"/>
            <OutputColumn id="MVR01_v" quantity="MVR01/0/generic_muscle_iaf_cell/v"/>
            <OutputColumn id="MVR02_v" quantity="MVR02/0/generic_muscle_iaf_cell/v"/>
            <OutputColumn id="MVR03_v" quantity="MVR03/0/generic_muscle_iaf_cell/v"/>
            <OutputColumn id="MVR04_v" quantity="MVR04/0/generic_muscle_iaf_cell/v"/>
            <OutputColumn id="MVR05_v" quantity="MVR05/0/generic_muscle_iaf_cell/v"/>
            <OutputColumn id="MVR06_v" quantity="MVR06/0/generic_muscle_iaf_cell/v"/>
            <OutputColumn id="MVR07_v" quantity="MVR07/0/generic_muscle_iaf_cell/v"/>
            <OutputColumn id="MVR08_v" quantity="MVR08/0/generic_muscle_iaf_cell/v"/>
            <OutputColumn id="MVR09_v" quantity="MVR09/0/generic_muscle_iaf_cell/v"/>
            <OutputColumn id="MVR10_v" quantity="MVR10/0/generic_muscle_iaf_cell/v"/>
            <OutputColumn id="MVR11_v" quantity="MVR11/0/generic_muscle_iaf_cell/v"/>
            <OutputColumn id="MVR12_v" quantity="MVR12/0/generic_muscle_iaf_cell/v"/>
            <OutputColumn id="MVR13_v" quantity="MVR13/0/generic_muscle_iaf_cell/v"/>
            <OutputColumn id="MVR14_v" quantity="MVR14/0/generic_muscle_iaf_cell/v"/>
            <OutputColumn id="MVR15_v" quantity="MVR15/0/generic_muscle_iaf_cell/v"/>
            <OutputColumn id="MVR16_v" quantity="MVR16/0/generic_muscle_iaf_cell/v"/>
            <OutputColumn id="MVR17_v" quantity="MVR17/0/generic_muscle_iaf_cell/v"/>
            <OutputColumn id="MVR18_v" quantity="MVR18/0/generic_muscle_iaf_cell/v"/>
            <OutputColumn id="MVR19_v" quantity="MVR19/0/generic_muscle_iaf_cell/v"/>
            <OutputColumn id="MVR20_v" quantity="MVR20/0/generic_muscle_iaf_cell/v"/>
            <OutputColumn id="MVR21_v" quantity="MVR21/0/generic_muscle_iaf_cell/v"/>
            <OutputColumn id="MVR22_v" quantity="MVR22/0/generic_muscle_iaf_cell/v"/>
            <OutputColumn id="MVR23_v" quantity="MVR23/0/generic_muscle_iaf_cell/v"/>
            <OutputColumn id="MVR24_v" quantity="MVR24/0/generic_muscle_iaf_cell/v"/>
        </OutputFile>
    </Simulation>

</Lems>
