<Lems>

    <!--

Parameters and setting used to generate this network:

    Data reader:                    cect.readers.SpreadsheetDataReader
    c302 version:                   0.11.1
    cect version:                   0.3.1
    owmeta version:                 - not installed -
    owmeta_core version:            - not installed -
    Cells:                          ['ADAL', 'PVCL']
    Cell stimulated:                []
    Connection:                     []
    Connection numbers overridden:  None
    Connection numbers scaled:      None
    Connection polarities override: None
    Muscles:                        ['MDR01']

    Known BioParameters:
        BioParameter: ca_conc_decay_time = 20 ms (SRC: BlindGuess, certainty 0.1)
        BioParameter: ca_conc_rho = 0.0002 mol_per_m_per_A_per_s (SRC: BlindGuess, certainty 0.1)
        BioParameter: ca_simple_erev = 50 mV (SRC: BlindGuess, certainty 0.1)
        BioParameter: cell_diameter = 5 (SRC: BlindGuess, certainty 0.1)
        BioParameter: exc_syn_ad = 20 per_s (SRC: BlindGuess, certainty 0.1)
        BioParameter: exc_syn_ar = .5 per_s (SRC: BlindGuess, certainty 0.1)
        BioParameter: exc_syn_beta = 0.25 per_mV (SRC: BlindGuess, certainty 0.1)
        BioParameter: exc_syn_erev = 0 mV (SRC: BlindGuess, certainty 0.1)
        BioParameter: exc_syn_vth = -20 mV (SRC: BlindGuess, certainty 0.1)
        BioParameter: global_connectivity_power_scaling = 0 (SRC: BlindGuess, certainty 0.1)
        BioParameter: inh_syn_ad = 10 per_s (SRC: BlindGuess, certainty 0.1)
        BioParameter: inh_syn_ar = .005 per_s (SRC: BlindGuess, certainty 0.1)
        BioParameter: inh_syn_beta = 0.5 per_mV (SRC: BlindGuess, certainty 0.1)
        BioParameter: inh_syn_erev = -80 mV (SRC: BlindGuess, certainty 0.1)
        BioParameter: inh_syn_vth = -25 mV (SRC: BlindGuess, certainty 0.1)
        BioParameter: initial_memb_pot = -50 mV (SRC: BlindGuess, certainty 0.1)
        BioParameter: k_slow_erev = -80 mV (SRC: BlindGuess, certainty 0.1)
        BioParameter: leak_erev = -44 mV (SRC: BlindGuess, certainty 0.1)
        BioParameter: muscle_ca_simple_cond_density = 0.25 mS_per_cm2 (SRC: BlindGuess, certainty 0.1)
        BioParameter: muscle_k_slow_cond_density = 0.3 mS_per_cm2 (SRC: BlindGuess, certainty 0.1)
        BioParameter: muscle_leak_cond_density = 0.00105 mS_per_cm2 (SRC: BlindGuess, certainty 0.1)
        BioParameter: muscle_length = 20 (SRC: BlindGuess, certainty 0.1)
        BioParameter: muscle_specific_capacitance = .6860 uF_per_cm2 (SRC: BlindGuess, certainty 0.1)
        BioParameter: muscle_spike_thresh = -20 mV (SRC: BlindGuess, certainty 0.1)
        BioParameter: neuron_ca_simple_cond_density = 0.06 mS_per_cm2 (SRC: BlindGuess, certainty 0.1)
        BioParameter: neuron_k_slow_cond_density = 0.1 mS_per_cm2 (SRC: BlindGuess, certainty 0.1)
        BioParameter: neuron_leak_cond_density = 0.05 mS_per_cm2 (SRC: BlindGuess, certainty 0.1)
        BioParameter: neuron_specific_capacitance = 5 uF_per_cm2 (SRC: BlindGuess, certainty 0.1)
        BioParameter: neuron_spike_thresh = -20 mV (SRC: BlindGuess, certainty 0.1)
        BioParameter: neuron_to_muscle_elec_syn_gbase = 0.0001 nS (SRC: BlindGuess, certainty 0.1)
        BioParameter: neuron_to_muscle_exc_syn_conductance = 22.3 nS (SRC: BlindGuess, certainty 0.1)
        BioParameter: neuron_to_muscle_inh_syn_conductance = 0.25 nS (SRC: BlindGuess, certainty 0.1)
        BioParameter: neuron_to_neuron_elec_syn_gbase = 0.05 nS (SRC: BlindGuess, certainty 0.1)
        BioParameter: neuron_to_neuron_exc_syn_conductance = 5 nS (SRC: BlindGuess, certainty 0.1)
        BioParameter: neuron_to_neuron_inh_syn_conductance = 260 nS (SRC: BlindGuess, certainty 0.1)
        BioParameter: unphysiological_offset_current = 0 pA (SRC: KnownError, certainty 0)
        BioParameter: unphysiological_offset_current_del = 0 ms (SRC: KnownError, certainty 0)
        BioParameter: unphysiological_offset_current_dur = 2000 ms (SRC: KnownError, certainty 0)

    -->

    <Target component="sim_c302_C0_IClamp" />

    <!-- Include core NeuroML2 ComponentType definitions -->

    <Include file="Cells.xml" />
    <Include file="Networks.xml" />
    <Include file="Simulation.xml" />

    <Include file="cell_C.xml" />

    <Include file="custom_synapses.xml" />

    <Include file="c302_C0_IClamp.net.nml" />

    <!-- End of NeuroML2 content -->

    <Simulation id="sim_c302_C0_IClamp" length="6000ms" step="0.05ms" target="c302_C0_IClamp">

        <Display id="neurons" title="c302_C0_IClamp: Membrane potential of a number of neurons" timeScale="1ms" xmin="-600.0" xmax="6600.000000000001" ymin="-60" ymax="25">

            <Line id="ADAL" quantity="ADAL/0/GenericNeuronCell/v" scale="1mV" color="#e13b00" timeScale="1ms" />
            <Line id="PVCL" quantity="PVCL/0/GenericNeuronCell/v" scale="1mV" color="#32b579" timeScale="1ms" />

        </Display>

        <Display id="muscles" title="c302_C0_IClamp: Membrane potential of a number of muscles" timeScale="1ms" xmin="-600.0" xmax="6600.000000000001" ymin="-60" ymax="25">

            <Line id="MDR01" quantity="MDR01/0/GenericMuscleCell/v" scale="1mV" color="#b1f7ed" timeScale="1ms" />

        </Display>

        <Display id="activity_neurons" title="c302_C0_IClamp: Activity of a number of neurons" timeScale="1ms" xmin="-600.0" xmax="6600.000000000001" ymin="-0.1" ymax="1.1">

            <Line id="ADAL" quantity="ADAL/0/GenericNeuronCell/caConc" scale="1" color="#2e112a" timeScale="1ms" />
            <Line id="PVCL" quantity="PVCL/0/GenericNeuronCell/caConc" scale="1" color="#000000" timeScale="1ms" />

        </Display>

        <Display id="activity_muscles" title="c302_C0_IClamp: Activity of a number of muscles" timeScale="1ms" xmin="-600.0" xmax="6600.000000000001" ymin="-0.1" ymax="1.1">

            <Line id="MDR01" quantity="MDR01/0/GenericMuscleCell/caConc" scale="1" color="#4c2e5d" timeScale="1ms" />

        </Display>

        <OutputFile id="neurons_v" fileName="c302_C0_IClamp.dat">
            <OutputColumn id="ADAL_v" quantity="ADAL/0/GenericNeuronCell/v"/>
            <OutputColumn id="PVCL_v" quantity="PVCL/0/GenericNeuronCell/v"/>
        </OutputFile>

        <OutputFile id="neurons_activity" fileName="c302_C0_IClamp.activity.dat">
            <OutputColumn id="ADAL_v" quantity="ADAL/0/GenericNeuronCell/caConc"/>
            <OutputColumn id="PVCL_v" quantity="PVCL/0/GenericNeuronCell/caConc"/>
        </OutputFile>
        <OutputFile id="muscles_v" fileName="c302_C0_IClamp.muscles.dat">
            <OutputColumn id="MDR01_v" quantity="MDR01/0/GenericMuscleCell/v"/>
        </OutputFile>
        <OutputFile id="muscles_activity" fileName="c302_C0_IClamp.muscles.activity.dat">
            <OutputColumn id="MDR01_v" quantity="MDR01/0/GenericMuscleCell/caConc"/>
        </OutputFile>
    </Simulation>

</Lems>
